// COMSOL Multiphysics 6.0.0.318 model "vibration_array_v4.0_target_4.mph"
// Outline of the model tree

Parameters
  Ampl1 = 0
  freq1 = 160  // N/m^3
  off1 = pi* -0.37775036  // Hz
  Ampl2 = 0
  freq2 = 160
  off2 = pi*0.64570058
  Ampl3 = 0
  freq3 = 160
  off3 = pi*0.22106574
  Ampl4 = 0
  freq4 = 160
  off4 = pi*0.49768849
  Ampl5 = 0
  freq5 = 160
  off5 = pi*0.57024484
  period_num = 20
  Ampl_target = 10
  target_x = 10
  target_y = 25

Functions
  an1: Analytic "解析 1" | funcname = min5; expr = min(x1,min(x2,min(x3,min(x4,x5)))); args = {x1, x2, x3, x4, x5}

Geometry
  geom1 "几何 1" (3D, length unit mm)
    wp1: WorkPlane "工作平面 1" | unite = on
      r1: Rectangle "矩形 1" | base = center; size = {71.5, 146.7}
      fil1: Fillet "倒圆角 1" | point = r1(1) points 1-4; radius = 5
      c1: Circle "圆 1" | pos = {-25.75, 63.35}; r = 1.5
      arr1: Array "阵列 1" | input = c1; size = {2, 3}; fullsize = {2, 3}; displ = {51.5, -63.35}
      dif1: Difference "差集 1" | input = fil1; input2 = arr1
    ext1: Extrude "拉伸 1" | workplane = wp1; input = wp1; distance = 1
    cyl1: Cylinder "圆柱体 1" | pos = {0, 0, -4}; r = 5; h = 4
    fil1: Fillet3D "倒圆角 1" | edge = cyl1(1) edges 2-5, 7, 8, 10, 11; radius = 0.5
    cyl2: Cylinder "圆柱体 2" | pos = {-24.25, 43.35, -4}; r = 5; h = 4
    fil2: Fillet3D "倒圆角 2" | edge = cyl2(1) edges 2-5, 7, 8, 10, 11; radius = 0.5
    arr1: Array "阵列 1" | input = fil2; size = {2, 2, 1}; fullsize = {2, 2, 1}; displ = {48.5, -86.7, 0}
    wp2: WorkPlane "工作平面 2" | quickz = 1; unite = on
      c1: Circle "圆 1" | pos = {target_x, target_y}; r = 0.5
    fin: Finalize "形成联合体"

Materials
  mat3: Common "Air" on all domains
    def "Basic"
      thermalexpansioncoefficient = alpha_p(pA,T)
      molarmass = 0.02897[kg/mol]
      bulkviscosity = muB(T)
      relpermeability = 1
      relpermittivity = 1
      dynamicviscosity = eta(T)
      ratioofspecificheat = 1.4
      electricconductivity = 0[S/m]
      heatcapacity = Cp(T)
      density = rho(pA,T)
      thermalconductivity = k(T)
      soundspeed = cs(T)
      eta: Piecewise | arg = T; pieces = {200.0, 1600.0, -8.38278E-7+8.35717342E-8*T^1-7.69429583E-11*T^2+4.6437266E-14*T^3-1.06585607E-17*T^4}; argunit = K; fununit = Pa*s
      Cp: Piecewise | arg = T; pieces = {200.0, 1600.0, 1047.63657-0.372589265*T^1+9.45304214E-4*T^2-6.02409443E-7*T^3+1.2858961E-10*T^4}; argunit = K; fununit = J/(kg*K)
      rho: Analytic | expr = pA*0.02897/R_const[K*mol/J]/T; args = {pA, T}; fununit = kg/m^3; argunit = {Pa, K}
      k: Piecewise | arg = T; pieces = {200.0, 1600.0, -0.00227583562+1.15480022E-4*T^1-7.90252856E-8*T^2+4.11702505E-11*T^3-7.43864331E-15*T^4}; argunit = K; fununit = W/(m*K)
      cs: Analytic | expr = sqrt(1.4*R_const[K*mol/J]/0.02897*T); args = T; fununit = m/s; argunit = K
      an1: Analytic | funcname = alpha_p; expr = -1/rho(pA,T)*d(rho(pA,T),T); args = {pA, T}; fununit = 1/K; argunit = {Pa, K}
      an2: Analytic "Analytic 2a" | funcname = muB; expr = 0.6*eta(T); args = T; fununit = Pa*s; argunit = K
    RefractiveIndex
      n = 1
      ki = 0
    NonlinearModel
      BA = (def.gamma+1)/2
    idealGas
      Rs = R_const/Mn
      heatcapacity = Cp(T)
      ratioofspecificheat = 1.4
      molarmass = 0.02897
      Cp: Piecewise | arg = T; pieces = {200.0, 1600.0, 1047.63657-0.372589265*T^1+9.45304214E-4*T^2-6.02409443E-7*T^3+1.2858961E-10*T^4}; argunit = K; fununit = J/(kg*K)
  mat4: Common "N50 (Sintered NdFeB)" on domains 2-6
    def "Basic"
      electricconductivity = 1/1.4[uohm*m]
      relpermittivity = 1
      density = 7500
    RemanentFluxDensity
      murec = 1.05
      normBr = 1.41[T]
    Enu "杨氏模量和泊松比"
      E = 160e9[Pa]
      nu = 0.24
  mat2: Common "FR4 (Circuit Board)" on domains 1
    def "Basic"
      relpermeability = 1
      electricconductivity = 0.004[S/m]
      relpermittivity = 4.5
      thermalexpansioncoefficient = 18e-6[1/K]
      heatcapacity = 1369[J/(kg*K)]
      density = 1900[kg/m^3]
      thermalconductivity = 0.3[W/(m*K)]
    Enu "Young's modulus and Poisson's ratio"
      E = 22e9[Pa]
      nu = 0.15

Physics
  solid: SolidMechanics "固体力学" on all domains
    dependent variable u = {u, v, w}
    lemm1: LinearElasticModel "线弹性材料 1" (default)
    free1: Free "自由 1" (default)
    init1: init "初始值 1" (default)
    fix1: Fixed "固定约束 1" on boundaries 24-35, 79, 80, 87, 88, 95-102
    bl1: BodyLoad "体载荷 1" on domains 3 | FperVol = {0, 0, Ampl1*sin(2*pi*freq1*t+off1)}
    bl2: BodyLoad "体载荷 2" on domains 2 | FperVol = {0, 0, Ampl2*sin(2*pi*freq2*t+off2)}
    bl3: BodyLoad "体载荷 3" on domains 5 | FperVol = {0, 0, Ampl3*sin(2*pi*freq3*t+off3)}
    bl4: BodyLoad "体载荷 4" on domains 6 | FperVol = {0, 0, Ampl4*sin(2*pi*freq4*t+off4)}
    bl5: BodyLoad "体载荷 5" on domains 4 | FperVol_src = userdef; FperVol = {0, 0, Ampl5*sin(2*pi*freq5*t+off5)}
    bndl1: BoundaryLoad "边界载荷 1" on boundaries 62
      LoadType = FollowerPressure
      FollowerPressure = Ampl_target*sin(2*pi*160*t)
      FperArea = {0, 0, Ampl_Target}

Mesh
  mesh1 "网格 1" (physics-controlled)
    size: MeshSizeDefault "大小" | hauto = 7

Studies
  std1 "研究 1"
    time: Transient "瞬态"
      tlist = range(0,1/min5(freq1,freq2,freq3,freq4,freq5)/100,period_num*1/min5(freq1,freq2,freq3,freq4,freq5))